<?xml version="1.0" encoding="UTF-8"?>
<networkml xmlns="http://morphml.org/networkml/schema" xmlns:meta="http://morphml.org/metadata/schema" xmlns:xsi="http://www.w3.org/2001/XMLSchema-instance" xsi:schemaLocation="http://morphml.org/networkml/schema  http://www.neuroml.org/NeuroMLValidator/NeuroMLFiles/Schemata/v1.8.1/Level3/NetworkML_v1.8.1.xsd" lengthUnits="micrometer">

    <meta:notes>

Network structure (NeuroML 1.x) for project: Ex3_Morphology_copy saved with neuroConstruct v1.7.1 on: 17:36:37, 12-Jul-15

Cell Group: CellGroup_1 contains 1 cells

    </meta:notes>

<meta:properties>
    <meta:property tag="neuroConstruct_random_seed" value="-1557493921"/>

    <meta:property tag="neuroConstruct_sim_config" value="Default Simulation Configuration"/>

    <meta:property tag="neuroConstruct_sim_duration" value="100.0"/>

    <meta:property tag="neuroConstruct_sim_time_step" value="0.02"/>

    <meta:property tag="neuroConstruct_temperature" value="6.3"/>
</meta:properties>

        <populations>
    <population name="CellGroup_1" cell_type="l22">
        <meta:properties>
        </meta:properties>
        <instances size="1">
            <instance id="0">
                <location x="90.842896" y="32.077633" z="8.879778"/>
            </instance>
        </instances>
    </population>
</populations>

            <!--There are no synaptic connections present in the network-->

        <!--<inputs units="SI Units">-->
    <!--<input name="Input_0">-->
        <!--<pulse_input delay="0.02" duration="0.06" amplitude="1.0E-9"/>-->
        <!--<target population="CellGroup_1">-->
            <!--<sites size="1">-->
            <!--<site cell_id="0" segment_id="0" fraction_along="0.5"/>-->
        <!--</sites>-->
        <!--</target>-->
    <!--</input>-->
<!--</inputs>-->

</networkml>
