<?xml version="1.0" encoding="UTF-8"?>
<neuroml xmlns="http://morphml.org/neuroml/schema" xmlns:meta="http://morphml.org/metadata/schema" xmlns:mml="http://morphml.org/morphml/schema" xmlns:bio="http://morphml.org/biophysics/schema" xmlns:cml="http://morphml.org/channelml/schema" xmlns:net="http://morphml.org/networkml/schema" xmlns:xsi="http://www.w3.org/2001/XMLSchema-instance" xsi:schemaLocation="http://morphml.org/neuroml/schema  http://www.neuroml.org/NeuroMLValidator/NeuroMLFiles/Schemata/v1.8.1/Level3/NeuroML_Level3_v1.8.1.xsd" lengthUnits="micron">

    <cells>
        <cell name="l22">

            <meta:notes>Cell morphology generated by neuroConstruct from file: l22.swc
ORIGINAL_SOURCE Neurolucida
CREATURE rat F344
REGION Hippocampus
FIELD/LAYER CA3
TYPE CA3c Pyramidal Cell in vivo young
CONTRIBUTOR Buzsaki_G and Turner_DA
REFERENCE J. Comp. Neurol. 356: 580-594, 1995
RAW l22.asc
EXTRAS Turner_P.CA3
SOMA_AREA 0.98E3
SHRINKAGE_CORRECTION 1.33 1.33 2.5
VERSION_NUMBER 2.0
VERSION_DATE 1998-03-27
*********************************************
SCALE 1.33  1.33  2.5
</meta:notes>

            <mml:segments>

                <mml:segment id="0" name="Comp_1" cable="0">
                    <mml:proximal x="0.0" y="-5.114" z="4.688" diameter="15.686"/>
                    <mml:distal x="0.313" y="-9.905" z="4.469" diameter="13.922"/>
                </mml:segment>

                <mml:segment id="1" name="Comp_483" parent="0" cable="0">
                    <mml:distal x="0.469" y="-12.301" z="4.359" diameter="9.362"/>
                </mml:segment>

                <mml:segment id="2" name="Comp_484" parent="0" cable="1">
                    <mml:proximal x="0.0" y="-5.114" z="4.688" diameter="15.686"/>
                    <mml:distal x="-0.313" y="-0.323" z="4.906" diameter="15.29"/>    <mml:properties>

                    <meta:property tag="comment" value="Segment originally specified as in soma being put in seperate section, as it's parent segment already has a child in the soma section"/>

                </mml:properties>

                </mml:segment>

                <mml:segment id="3" name="Comp_569" parent="2" cable="1">
                    <mml:distal x="-0.625" y="4.469" z="5.125" diameter="11.864"/>
                </mml:segment>

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
            </mml:segments>

            <mml:cables>

                <mml:cable id="0" name="Soma">
                    <meta:group>all</meta:group>
                    <meta:group>Colour_White</meta:group>
                    <meta:group>soma_group</meta:group>
                </mml:cable>

                <mml:cable id="1" name="ExtraSomaSec_Comp_484" fract_along_parent="0.0">
                    <meta:group>all</meta:group>
                    <meta:group>dendrite_group</meta:group>
                    <meta:group>ExtraSomaSegments</meta:group>
                    <meta:group>Colour_White</meta:group>
                </mml:cable>

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
            </mml:cables>

            <!--Adding the biophysical parameters-->

            <biophysics units="Physiological Units">

                <bio:mechanism name="KConductance" type="Channel Mechanism">
                    <bio:parameter name="gmax" value="36.0">
                        <bio:group>all</bio:group>
                    </bio:parameter>
                </bio:mechanism>

                <bio:mechanism name="LeakConductance" type="Channel Mechanism" passive_conductance="true">
                    <bio:parameter name="e" value="-54.3">
                        <bio:group>all</bio:group>
                    </bio:parameter>
                    <bio:parameter name="gmax" value="0.3">
                        <bio:group>all</bio:group>
                    </bio:parameter>
                </bio:mechanism>

                <bio:mechanism name="NaConductance" type="Channel Mechanism">
                    <bio:parameter name="gmax" value="120.0">
                        <bio:group>all</bio:group>
                    </bio:parameter>
                </bio:mechanism>

                <bio:spec_capacitance>
                    <bio:parameter value="1.0">
                        <bio:group>all</bio:group>
                    </bio:parameter>
                </bio:spec_capacitance>

                <bio:spec_axial_resistance>
                    <bio:parameter value="0.03">
                        <bio:group>all</bio:group>
                    </bio:parameter>
                </bio:spec_axial_resistance>

                <bio:init_memb_potential>
                    <bio:parameter value="-60.0">
                        <bio:group>all</bio:group>
                    </bio:parameter>
                </bio:init_memb_potential></biophysics>

            <connectivity/>

        </cell>
    </cells>
</neuroml>
