<?xml version="1.0" encoding="iso-8859-1"?>

<neuroml xmlns="http://www.neuroml.org/schema/neuroml2" xmlns:xsi="http://www.w3.org/2001/XMLSchema-instance" xsi:schemaLocation="http://www.neuroml.org/schema/neuroml2 https://raw.github.com/NeuroML/NeuroML2/development/Schemas/NeuroML2/NeuroML_v2beta4.xsd" id="KConductance">

    <notes>ChannelML file containing a single Channel description</notes>

    <ionChannel id="KConductance" conductance="10pS" type="ionChannelHH" species="k">

        <notes>Simple example of K conductance in squid giant axon. Based on channel from Hodgkin and Huxley 1952</notes>

        <annotation>
            <rdf:RDF xmlns:rdf="http://www.w3.org/1999/02/22-rdf-syntax-ns#">
                <rdf:Description rdf:about="KConductance">

                    <bqmodel:isDescribedBy xmlns:bqmodel="http://biomodels.net/model-qualifiers/">
                        <rdf:Bag>
                            <rdf:li>A. L. Hodgkin and A. F. Huxley, A quantitative description of membrane current and its application
            to conduction and excitation in nerve, J. Physiol., vol. 117, pp. 500-544, 1952.</rdf:li>
                            <rdf:li rdf:resource="http://www.ncbi.nlm.nih.gov/entrez/query.fcgi?cmd=Retrieve&amp;db=pubmed&amp;dopt=Abstract&amp;list_uids=12991237"/>
                        </rdf:Bag>
                    </bqmodel:isDescribedBy>

                    <bqbiol:isVersionOf xmlns:bqbiol="http://biomodels.net/biology-qualifiers/">
                        <rdf:Bag>
                            <rdf:li>K channels</rdf:li>
                            <rdf:li rdf:resource="http://senselab.med.yale.edu/senselab/NeuronDB/channelGene2.htm#table3"/>
                        </rdf:Bag>
                    </bqbiol:isVersionOf>

                </rdf:Description>
            </rdf:RDF>
        </annotation>

        <gate id="n" type="gateHHrates" instances="4">
            <forwardRate type="HHExpLinearRate" rate="0.1per_ms" scale="10mV" midpoint="-55mV"/>
            <reverseRate type="HHExpRate" rate="0.125per_ms" scale="-80mV" midpoint="-65mV"/>
        </gate>

    </ionChannel>

</neuroml>
