<Lems xmlns="http://www.neuroml.org/lems/0.7.2" xmlns:xsi="http://www.w3.org/2001/XMLSchema-instance" xsi:schemaLocation="http://www.neuroml.org/lems/0.7.2  https://raw.githubusercontent.com/LEMS/LEMS/development/Schemas/LEMS/LEMS_v0.7.2.xsd">

    <Target component="sim1" reportFile="/home1/dilawars/nC_projects/Ex3_Morphology_copy/simulations/Sim_7/simulator.props" timesFile="/home1/dilawars/nC_projects/Ex3_Morphology_copy/simulations/Sim_7/time.dat"/>

        <!--Include standard NeuroML 2 ComponentType definitions-->

    <Include file="Cells.xml"/>
    <Include file="Networks.xml"/>
    <Include file="Simulation.xml"/>

        <!--Include the generated NeuroML 2 files-->

        <!--   Channel/synapse files-->
    <Include file="KConductance.channel.nml"/>
    <Include file="NaConductance.channel.nml"/>
        <!--   Cell files-->
    <Include file="l22.cell.nml"/>
        <!--   Network file-->
    <Include file="Ex3_Morphology_copy.net.nml"/>

        <!--Note: this could be: Simulation id="sim1" ... , but Component type="Simulation" ...
        is used to allow validation of this file according to the LEMS schema specified above...-->
    <Component type="Simulation" id="sim1" length="100.0ms" step="0.02ms" target="network_Ex3_Morphology_copy">

        <Display id="CellGroup_1_v" title="Ex3_Morphology_copy: Default Simulation Configuration, CellGroup_1, VOLTAGE" xmin="-0.010000001" xmax="0.11000001" ymin="-0.104" ymax="0.064" timeScale="1s">
            <Line id="v" timeScale="1s" quantity="CellGroup_1/0/l22/0/v" scale="1 V" color="#000000"/>
        </Display>

        <OutputFile id="CellGroup_1_v_0_0_OF" fileName="/home1/dilawars/nC_projects/Ex3_Morphology_copy/simulations/Sim_7/CellGroup_1_0.0.dat">
            <OutputColumn id="v" quantity="CellGroup_1/0/l22/0/v"/>
        </OutputFile>
    </Component>

</Lems>
