<?xml version="1.0" encoding="UTF-8"?>
<neuroml xmlns="http://www.neuroml.org/schema/neuroml2" xmlns:xsi="http://www.w3.org/2001/XMLSchema-instance" xsi:schemaLocation="http://www.neuroml.org/schema/neuroml2  https://raw.githubusercontent.com/NeuroML/NeuroML2/development/Schemas/NeuroML2/NeuroML_v2beta4.xsd" id="l22">

    <include href="KConductance.channel.nml"/>

    <include href="NaConductance.channel.nml"/>

    <cell id="l22">

        <notes>Cell morphology generated by neuroConstruct from file: l22.swc
ORIGINAL_SOURCE Neurolucida
CREATURE rat F344
REGION Hippocampus
FIELD/LAYER CA3
TYPE CA3c Pyramidal Cell in vivo young
CONTRIBUTOR Buzsaki_G and Turner_DA
REFERENCE J. Comp. Neurol. 356: 580-594, 1995
RAW l22.asc
EXTRAS Turner_P.CA3
SOMA_AREA 0.98E3
SHRINKAGE_CORRECTION 1.33 1.33 2.5
VERSION_NUMBER 2.0
VERSION_DATE 1998-03-27
*********************************************
SCALE 1.33  1.33  2.5</notes>

        <morphology id="morphology_l22">

            <segment id="0" name="Comp_1">
                <proximal x="0.0" y="-5.114" z="4.688" diameter="15.686"/>
                <distal x="0.313" y="-9.905" z="4.469" diameter="13.922"/>
            </segment>

            <segment id="1" name="Comp_483">
                <parent segment="0"/>
                <distal x="0.469" y="-12.301" z="4.359" diameter="9.362"/>
            </segment>

            <segment id="2" name="Comp_484">
                <parent segment="0" fractionAlong="0.0"/>
                <proximal x="0.0" y="-5.114" z="4.688" diameter="15.686"/>
                <distal x="-0.313" y="-0.323" z="4.906" diameter="15.29"/>
            </segment>

            <segment id="3" name="Comp_569">
                <parent segment="2"/>
                <distal x="-0.625" y="4.469" z="5.125" diameter="11.864"/>
            </segment>

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
            <segmentGroup id="Soma" neuroLexId="sao864921383">    <!--
                This group contains an unbranched set of segments, and all of the segmentGroups marked with
                neuroLexId = sao864921383 form a non-overlapping set of all of the segments.
                These segmentGroups correspond to the 'cables' of NeuroML v1.8.1. -->

                <member segment="0"/>

                <member segment="1"/>
            </segmentGroup>

            <segmentGroup id="ExtraSomaSec_Comp_484" neuroLexId="sao864921383">    <!--
                This group contains an unbranched set of segments, and all of the segmentGroups marked with
                neuroLexId = sao864921383 form a non-overlapping set of all of the segments.
                These segmentGroups correspond to the 'cables' of NeuroML v1.8.1. -->

                <member segment="2"/>

                <member segment="3"/>

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            </segmentGroup>

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
        </morphology>

            <!--Adding the biophysical parameters-->

        <biophysicalProperties id="biophys">

            <membraneProperties>

                <channelDensity condDensity="36.0 mS_per_cm2" id="KConductance_all" ionChannel="KConductance" ion="k" erev="-77.0 mV"/>

                <channelDensity condDensity="120.0 mS_per_cm2" id="NaConductance_all" ionChannel="NaConductance" ion="na" erev="50.0 mV"/>

                <spikeThresh value="0 mV"/>

                <specificCapacitance value="1.0 uF_per_cm2"/>

                <initMembPotential value="-60.0 mV"/>

            </membraneProperties>

            <intracellularProperties>

                <resistivity value="0.03 kohm_cm"/>

            </intracellularProperties>

        </biophysicalProperties>

    </cell>

</neuroml>
